// SBML level 2 version 4

model Hailstone_Text()
  // Hailstone_Text

  // Compartments:
  compartment unnamed = 1;

  // Species:
  substanceOnly species X1 in unnamed = 20;  // substance in MWBUILTINUNIT_molecule
  substanceOnly species PO in unnamed = 0;  // substance in MWBUILTINUNIT_molecule
  substanceOnly species H in unnamed = 0;  // substance in MWBUILTINUNIT_molecule
  substanceOnly species M in unnamed = 0;  // substance in MWBUILTINUNIT_molecule
  substanceOnly species PE in unnamed = 0;  // substance in MWBUILTINUNIT_molecule
  substanceOnly species D in unnamed = 0;  // substance in MWBUILTINUNIT_molecule
  substanceOnly species B in unnamed = 0;  // substance in MWBUILTINUNIT_molecule
  substanceOnly species A in unnamed = 0;  // substance in MWBUILTINUNIT_molecule
  substanceOnly species CE in unnamed = 0;  // substance in MWBUILTINUNIT_molecule
  substanceOnly species Y in unnamed = 0;  // substance in MWBUILTINUNIT_molecule
  substanceOnly species CO in unnamed = 0;  // substance in MWBUILTINUNIT_molecule

  // Reactions:
  _1: X1 => PO + H + M; _1_k*X1;
    _1_k = 1;
  _2: PO + PO => PE; _2_k*PO*PO;
    _2_k = 1;
  _3: PO + PE => PO; _3_k*PO*PE;
    _3_k = 1;
  _4: PE + PE => PE; _4_k*PE*PE;
    _4_k = 1;
  _5: H + H => D; _5_k*H*H;
    _5_k = 1;
  _6: M => B + B + B + A + A + A + A + A + A; _6_k*M;
    _6_k = 1;
  _7: B + B + A + A => ; _7_k*B*B*A*A;
    _7_k = 1;
  _8: PE + D => PE + CE + Y; _8_k*PE*D;
    _8_k = 1;
  _9: PO + A => PO + CO + Y; _9_k*PO*A;
    _9_k = 1;
  _10: CE + PO + Y => PO + D; _10_k*CE*PO*Y;
    _10_k = 1;
  _11: CO + PE + Y => PE + A; _11_k*CO*PE*Y;
    _11_k = 1;

  // Unit definitions:
  unit MWBUILTINUNIT_molecule = 1.660539e-24 mole;
end
