// SBML level 2 version 4

model Hailstone()
  // Hailstone

  // Compartments:
  compartment HailstoneCompartment = 1;

  // Species:
  species X1 in HailstoneCompartment = 50;
  species PO in HailstoneCompartment = 0;
  species H in HailstoneCompartment = 0;
  species M in HailstoneCompartment = 0;
  species PE in HailstoneCompartment = 0;
  species D in HailstoneCompartment = 0;
  species B in HailstoneCompartment = 0;
  species A in HailstoneCompartment = 0;
  species CE in HailstoneCompartment = 0;
  species Y in HailstoneCompartment = 0;
  species CO in HailstoneCompartment = 0;

  // Reactions:
  reaction_1: X1 => PO + H + M; reaction_1_kf*X1;
    reaction_1_kf = 1;
  reaction_2: PO + PO => PE; reaction_2_kf*PO*PO;
    reaction_2_kf = 1;
  reaction_3: PE + PO => PO; reaction_3_kf*PE*PO;
    reaction_3_kf = 1;
  reaction_4: PE + PE => PE; reaction_4_kf*PE*PE;
    reaction_4_kf = 1;
  reaction_5: H + H => D; reaction_5_kf*H*H;
    reaction_5_kf = 1;
  reaction_6: M => B + B + B + A + A + A + A + A + A; reaction_6_kf*M;
    reaction_6_kf = 1;
  reaction_7: B + B + A + A => ; reaction_7_kf*B*B*A*A;
    reaction_7_kf = 1;
  reaction_8: PE + D => PE + CE + Y; reaction_8_kf*PE*D;
    reaction_8_kf = 1;
  reaction_9: PO + A => PO + CO + Y; reaction_9_kf*PO*A;
    reaction_9_kf = 1;
  reaction_10: CE + PO + Y => PO + D; reaction_10_kf*CE*PO*Y;
    reaction_10_kf = 1;
  reaction_11: CO + PE + Y => PE + A; reaction_11_kf*CO*PE*Y;
    reaction_11_kf = 1;
  reaction_1055: B + B + A + A => ; reaction_1055_kf*B*B*A*A;
    reaction_1055_kf = 1;
  reaction_1056: M => B + B + B + A + A + A + A + A + A; reaction_1056_kf*M;
    reaction_1056_kf = 1;
  reaction_1057: PO + PO => PE; reaction_1057_kf*PO*PO;
    reaction_1057_kf = 1;
end
