// SBML level 2 version 4

model Subtraction()
  // Subtraction

  // Compartments:
  compartment unnamed = 1;

  // Species:
  species X1 in unnamed = 0;
  species Y in unnamed = 0;
  species X2 in unnamed = 0;

  // Reactions:
  reaction_1: X1 => Y; reaction_1_kf*X1;
    reaction_1_kf = 1;
  mutant_changereactant: Y + X2 => ; speciesReference(times, mutant_changereactant_kf, Y); mutant_changereactant is "mutant-changereactant";
    mutant_changereactant_kf = 1;
  reaction_23: Y + X2 => ; speciesReference(times, reaction_23_kf, Y);
    reaction_23_kf = 1;
  reaction_24: Y + X2 => ; speciesReference(times, reaction_24_kf, Y);
    reaction_24_kf = 1;
end
